# Лабораторная работа №2
№1
Xa := -2
Ya := -4
Xb := -3
Yb := 0
Xc := 0
Yc := 4
Xd := 3
Yd := 0
X := [-2; -2; 2; 2; 3; 0; -3; -2; 2]
Y := [0; -4; -4; 0; 0; 4; 0; 0; 0]
Xe := 2
Ye := -4
Xf := -2
Yf := 0
Xh := 2
Yh := 0
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# Координаты окна Windows:
Xlw := 100
Xhw := 400
Ylw := 200
Yhw := 500
# Координаты левого верхнего угла области | Координаты правого нижнего угла области
XL := min(X) = -3
YH := max(Y) = 4
YL := min(Y) = -4
XH := max(X) = 3
# Размеры окна(ширина и высота области отображения в мировых координатах)
ΔY := YH - YL = 8
ΔX := XH - XL = 6
# Размеры фигуры(ширина и высота области отображения в оконных координатах)
ΔYW := Yhw - Ylw = 300
ΔXW := Xhw - Xlw = 300
Kx := ΔXW/ΔX = 50
Ky := ΔYW/ΔY = 37.5
# Матрица пересчёта
Tsw := [Kx, 0, Xlw - Kx*XL; 0, Ky, Yhw + Ky*YL; 0, 0, 1] = [50, 0, 250; 0, 37.5, 350; 0, 0, 1]
# Перечисление координат в оконные
[Xaw; Yaw; q] := Tsw*[Xa; Ya; 1] = [150; 200; 1]
[Xbw; Ybw; q] := Tsw*[Xb; Yb; 1] = [100; 350; 1]
[Xcw; Ycw; q] := Tsw*[Xc; Yc; 1] = [250; 500; 1]
[Xdw; Ydw; q] := Tsw*[Xd; Yd; 1] = [400; 350; 1]
[Xew; Yew; q] := Tsw*[Xe; Ye; 1] = [350; 200; 1]
[Xfw; Yfw; q] := Tsw*[Xf; Yf; 1] = [150; 350; 1]
[Xhw; Yhw; q] := Tsw*[Xh; Yh; 1] = [350; 350; 1]
Xh := [Xfw; Xaw; Xew; Xhw; Xdw; Xcw; Xbw; Xfw; Xhw]
Yh := [Yfw; Yaw; Yew; Yhw; Ydw; Ycw; Ybw; Yfw; Yhw]
# Получившаяся фигура
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# № 2
f(x) := sin(π*x)*sqrt(|x|)
x_1 := -6
x_2 := 6
Δx := 0.1
x := -6, -5.9 .. 6
# Координаты левого вернего угла области | Координаты правого нижнего угла области
Xlw := 100
Xhw := 800
Ylw := 200
Yhw := 900
# Задание значений
(6 + 6)/0.1 = 120
i := 0, 1 .. 120
X[i] := x_1 + i*Δx
Y[i] := f(X[i])
Z[i] := 1
# Координаты левого нижнего угла
Xl := -6
Yl := min(Y) = -2.34521
# Координаты правого вержнего угла
Xh := 6
Yh := max(Y) = 2.34521
# Размеры окна(ширина и высота области отображения в мировых координатах)
ΔXw := Xhw - Xlw = 700
ΔYw := Yhw - Ylw = 700
# Размеры фигуры(ширина и высота области отображения в оконных координатах)
ΔX := 12
ΔY := 4.69
Kx := ΔXw/ΔX = 58.3333
Ky := ΔYw/ΔY = 149.254
# Матрица пересчёта
T := [Kx, 0, Xlw - Kx*Xl; 0, Ky, Yhw + Ky*Yl; 0, 0, 1] = [58.3333, 0, 450; 0, 149.254, 549.969; 0, 0, 1]
# С помощью stack() создаём матрицу координат точек графика
V := stack(transpose(X), transpose(Y), transpose(Z))
# Создание матрицы с оконными координатами
Vw := T*V
# Массивы с оконными координатами графика
Xw := transpose(Vw)[:, 0]
Yw := transpose(Vw)[:, 1]
# Графическое представление
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