# Задание 1
x := 2
n := 7
y := sqrt(x^3 + n + cos(|n*x - 1|)^2)/(nthroot(x^5 + sin(x) + n, 4)*cos(π*(x + n)/4))
y = 2.23819
# Задание 2
x := 7
y := 10
z := -3
p := if(x > y, sin(x) + 3*|y| - z^2, (y + 3)*ln(|x + 1|)/sqrt(z^2 + 1))
p = 8.5485
q := if((x > y)*(x < 1), cos(x) + 2*|y + 1| - z, (x*y + 3)/sqrt(y^2 + 5))
q = 7.12407
w := if(x < y + y > 10, x^2 + 2*(y*x + 1) - z, (x^-3*y^2 + 3)*sqrt(z^2 + 7))
w = 194
# Задание 3
x2 := -2, -1.6 .. 2
f(x2) := (x2^2 - n*x2 + sin(x2))*sqrt(|x2 - cos(n*x2)|)
f(x2) = [24.9825; 17.1342; 7.34953; 6.93211; 1.89287; 0; -2.6074; -0.663185; -7.90396; -9.03057; -12.4089]
x2 = [-2; -1.6; -1.2; -0.8; -0.4; 0; 0.4; 0.8; 1.2; 1.6; 2]
# Задание 4
A := runif(3, -3*n, 3*n)
B := runif(3, -3*n, 3*n)
C := runif(3, -3*n, 3*n)
A = [-20.9467; -12.8804; 3.57026]
C = [8.84081; -8.23259; -17.1607]
B = [-6.28706; 13.5592; -13.6866]
w := (A×B)*C
V := B×C
s := A*B
s = -91.8195
w = 9939.22
V = [-345.361; -228.891; -68.1154]
# Без шаблонов
s1 := A[0]*B[0] + A[1]*B[1] + A[2]*B[2]
V1 := [B[1]*C[2] - B[2]*C[1]; B[2]*C[0] - B[0]*C[2]; B[0]*C[1] - B[1]*C[0]]
s1 = -91.8195
V1 = [-345.361; -228.891; -68.1154]
dA := sqrt(A[0]^2 + A[1]^2 + A[2]^2)
dB := sqrt(B[0]^2 + B[1]^2 + B[2]^2)
dC := sqrt(C[0]^2 + C[1]^2 + C[2]^2)
Array := [dA; dB; dC]
Array = [24.8479; 20.2658; 20.9863]
Max := max(Array)
str := if(Max == |dA|, "Это А", if(Max == |dB|, "Это B", if(Max == |dC|, "Это C", "")))
Max = 24.8479
str = "Это А"
i := 0, 1 .. 9
j := 0, 1 .. 9
M[i, j] := -10 + floor(rnd(20))
M = [
    -8, 9, -8, -10, 0, 2, -7, -1, -9, 5;
    0, 7, 9, 0, -1, 7, 5, 9, 2, -5;
    6, -3, 3, -10, -5, 1, 6, -1, 4, -1;
    4, 1, 4, 1, -7, -2, 0, 5, -7, -1;
    3, -8, -8, 3, -2, 9, -7, 6, -7, 6;
    -7, 4, -5, 3, 4, -8, 6, 0, -2, 8;
    0, -1, 6, -1, 9, 4, -7, 6, 0, -10;
    1, 0, 6, 3, 6, -8, -4, -5, -8, 6;
    2, -5, -10, 6, -6, 1, -8, 5, 0, -2;
    3, -2, 1, 2, 0, 3, -7, -7, -1, -9
]
# Сумма элементов | Сумма отрицательных
# Сумма всех | Сумма положительных
pM[i, j] := M[i, j]*(M[i, j] > 0)
nM[i, j] := M[i, j]*(M[i, j] < 0)
Mv := sum(M[:, i], i)
sum := sum(Mv[i], i)
pMv[i] := sum(pM[:, i])
nMv[i] := sum(nM[:, i])
sum = -29
psum := sum(pMv) = 212
nsum := sum(nMv) = -241
X := M[:, 0]
Y := transpose(M)[:, 9]
Y := transpose(Y)
Y = [3, -2, 1, 2, 0, 3, -7, -7, -1, -9]
X = [-8; 0; 6; 4; 3; -7; 0; 1; 2; 3]
X*Y = [
    -24, 16, -8, -16, 0, -24, 56, 56, 8, 72;
    0, 0, 0, 0, 0, 0, 0, 0, 0, 0;
    18, -12, 6, 12, 0, 18, -42, -42, -6, -54;
    12, -8, 4, 8, 0, 12, -28, -28, -4, -36;
    9, -6, 3, 6, 0, 9, -21, -21, -3, -27;
    -21, 14, -7, -14, 0, -21, 49, 49, 7, 63;
    0, 0, 0, 0, 0, 0, 0, 0, 0, 0;
    3, -2, 1, 2, 0, 3, -7, -7, -1, -9;
    6, -4, 2, 4, 0, 6, -14, -14, -2, -18;
    9, -6, 3, 6, 0, 9, -21, -21, -3, -27
]
# Задание 5
y(x3) := e^(-(|x3|/3))*cos(x3)
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# Задание 6
x4 := -9, -8.75 .. 9
f(x) := if(x < 0, e^x*x^3, e^(-x)*x^3)
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Y7
# Задание 7
x0 := -2*π
i := 0, 1 .. 16
Δx := π/4
g(x) := sqrt(|x|)*sin(x)
x[i] := x0 + Δx*i
Y7 := g(x)
filename1 := "X.txt"
filename2 := "Y.txt"
WRITEPRN(filename1) := x
WRITEPRN(filename2) := Y7
XX := READPRN(filename1)
YY := READPRN(filename2)
XX = [-6.283; -5.498; -4.712; -3.927; -3.142; -2.356; -1.571; -0.7854; 0; 0.7854; 1.571; 2.356; 3.142; 3.927; 4.712; 5.498; 6.283]
YY = [0; 2.816; 3.983; 2.816; 0; -2.816; -3.983; -2.816; 0; 2.816; 3.983; 2.816; 0; -2.816; -3.983; -2.816; 0]
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# Задание 8
x9 := -3, -2.9 .. 3
q(x) := e^(-x^2)
qd(x9) := d/dx9(q(x9))
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# Задание 9
f(x, y) := sin(sqrt(x^2 + y^2))/sqrt(x^2 + y^2)
# [component: inputs f]
# Задание 10
x := -2
x := -2
f10(x) := x^2 + (x - 2)*sin(x) - 5  # bcgh
root(f10(x), x) = -1.32936
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x := 2
root(f10(x), x) = 2.19967
# Задание 11
f11(x11) := x11^2 + x11*sin(2*x11) - (x11 - 5)*cos(x11)
x11 := -4, -3.9 .. 4
root(f11(x), x, -4, -2) = -2.97354
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root(f11(x11), x11, -2, 4) = -1.93283
# Задание 12
n := 10
x^3 + (4 - n)*x^2 + (3 - 4*n)*x - 3*n == 0
V := [-3*n; 3 - 4*n; 4 - n; 1]
r := polyroots(V) = [-3; -1; 10]
# Задание 13
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M := [1, 2, 3; -2, -1, 1; 0, 1, 2]
V := [14; -1; 8]
R := M^-1*V
R = [1; 2; 3]
z := 0
x := 0
y := 0
Given
1*x + 2*y + 3*z - 14 == 0
y1(x, z) := 7 - 1.5*z - 0.5*x
-2*x - 1*y + z + 1 == 0
y2(x, z) := -2*x + 1 + z
0*x + y + 2*z - 8 == 0
y3(x, z) := 8 - 2*z - 0*x
V := Find(x, y, z)
y1(V[0], V[2]) = 2
y2(V[0], V[2]) = 2
V = [1; 2; 3]
y3(V[0], V[2]) = 2
# Задание 14
y1(x) := sqrt(1 - x^2/81)*4
y2(x) := sqrt(1 - x^2/81)*(-4)
y3(x) := sqrt(25 - (x - 9)^2) + 2
y4(x) := -sqrt(25 - (x - 9)^2) + 2
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Given
x := 4
x^2/81 + y^2/16 == 1
y := 4
(x - 9)^2 + (y - 2)^2 == 25
Find(x, y) = [4.23934; 3.52845]
Given
x := 7
y := -3
x^2/81 + y^2/16 == 1
(x - 9)^2 + (y - 2)^2 == 25
Find(x, y) = [6.9308; -2.55175]
# Задание 15
f(x) := x*sin(x)
x := 0, 0.1 .. 10
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# Два максимума и один минимум
x1 := 2
x2 := 4
x3 := 8
x3_max := Maximize(f, x3)
x2_min := Minimize(f, x2)
x1_max := Maximize(f, x1)
y1_max := f(x1_max)
y2_min := f(x2_min)
y3_max := f(x3_max)
y1_max = 1.81971
y2_min = -4.81447
y3_max = 7.91673
